A1 := READBMP("1.bmp")
A2 := READBMP("2.bmp")
A3 := READBMP("3.bmp")
A4 := READBMP("4.bmp")
A1 := submatrix(A1, 320, 1200, 700, 1500)
WRITEBMP("s1.bmp") := A1  # disabled
A2 := submatrix(A2, 320, 1200, 700, 1500)
A0 := READBMP("s1.bmp")
A3 := submatrix(A3, 320, 1200, 700, 1500)
A4 := submatrix(A4, 320, 1200, 700, 1500)
Nx := cols(A1)
Ny := rows(A1)
ε := 10^-7
j := 0 .. Nx - 1
i := 0 .. Ny - 1
φ1[i, j] := π + atan2(A2[i, j] - A4[i, j], A1[i, j] - A3[i, j] + ε)
φ1[i, j] := if(A0[i, j] == 255, φ1[i, j], 0)
# [component: inputs scale(φ1, 0, 255)]
A1 := READBMP("5.bmp")
A2 := READBMP("6.bmp")
A3 := READBMP("7.bmp")
A4 := READBMP("8.bmp")
A1 := submatrix(A1, 320, 1200, 700, 1500)
A2 := submatrix(A2, 320, 1200, 700, 1500)
A3 := submatrix(A3, 320, 1200, 700, 1500)
A4 := submatrix(A4, 320, 1200, 700, 1500)
j := 0 .. Nx - 1
i := 0 .. Ny - 1
φ2[i, j] := π + atan2(A2[i, j] - A4[i, j], A1[i, j] - A3[i, j] + ε)
φ2[i, j] := if(A0[i, j] == 255, φ2[i, j], 0)
# [component: inputs scale(φ2, 0, 255)]
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