A1 := READBMP("b.bmp5.bmp")
A2 := READBMP("b.bmp6.bmp")
A3 := READBMP("b.bmp7.bmp")
A4 := READBMP("b.bmp8.bmp")
A1 := submatrix(A1, 200, 1200, 550, 1400)
A2 := submatrix(A2, 200, 1200, 550, 1400)
A3 := submatrix(A3, 200, 1200, 550, 1400)
A4 := submatrix(A4, 200, 1200, 550, 1400)
Nx := cols(A1)
Ny := rows(A1)
ε := 10^-7
j := 0 .. Nx - 1
i := 0 .. Ny - 1
φ1[i, j] := π + atan2(A2[i, j] - A4[i, j], A1[i, j] - A3[i, j] + ε)
φ2 := READBMP("s1-1.bmp")
φ2 := submatrix(φ2, 200, 1200, 550, 1400)
# [component: inputs scale(φ2, 0, 255)]
Fringe0(φ, φ0, Color) :=
    M ← rows(φ) - 1
    N ← cols(φ) - 1
    for i ∈ 0 .. M
        for j ∈ 0 .. N
            φ1[i, j] ← φ0[i, j] if φ[i, j] == Color
            φ1[i, j] ← -1 otherwise
    φ1
WRITEBMP("s1.bmp") := 255/max(φ1)*φ1  # disabled
Color := φ2[500, 700]
φ2 := Fringe0(φ2, φ1, Color)
φ2[500, 700] = 2.88964
min(φ2) = -1
m := 9
i := 0 .. cols(φ2) - 1
φ3[:, i] := medsmooth(φ2[:, i], m)
i := 0 .. rows(φ3) - 1
φ3 := transpose(φ3)
φ4[:, i] := medsmooth(φ3[:, i], m)
φ4 := transpose(φ4)
# [component: inputs scale(φ2, 0, 255)]
# [component: inputs scale(φ4, 0, 255)]
Fringe0(φ) :=
    M ← rows(φ) - 1
    N ← cols(φ) - 1
    for i ∈ 0 .. M
        for j ∈ 0 .. N
            B[i, j] ← sign(sin(φ[i, j])) if φ[i, j] ≠ -1
            B[i, j] ← 0 otherwise
    B
B := Fringe0(φ4)
WRITEBMP("s1.bmp") := B  # disabled
B := READBMP("s1.bmp")
# [component: inputs B]
# [component: inputs scale(φ4, 0, 255)]
Fringe0(φ, φ1) :=
    M ← rows(φ) - 1
    N ← cols(φ) - 1
    for i ∈ 0 .. M
        for j ∈ 0 .. N
            φ2[i, j] ← 0 if φ1[i, j] == 0
            φ2[i, j] ← φ[i, j] otherwise
    φ2
Fringe(φ, Color) :=
    K ← rows(Color) - 1
    M ← rows(φ) - 1
    N ← cols(φ) - 1
    for i ∈ 0 .. M
        for j ∈ 0 .. N
            for k ∈ 0 .. K
                φ1[i, j] ← Color[k, 1] if φ[i, j] == Color[k, 0]
    φ1
k := 450
b := transpose(B)[:, k]
Color := [0, 0; 255, 0; 93, 1; 130, 2; 116, 3; 226, 4; 107, 5]
φ3 := Fringe(B, Color)
# [component: inputs scale(φ3, 0, 255)]
# [component: inputs scale(φ4, 0, 255)]
Fringe1(φ, φ1) :=
    M ← rows(φ) - 1
    N ← cols(φ) - 1
    for i ∈ 0 .. M
        for j ∈ 0 .. N
            φ5[i, j] ← φ[i, j] + φ1[i, j]*2*π
    φ5
φ4 := Fringe1(φ4, φ3)
# [component: inputs φ4]
# [component: inputs scale(φ4, 0, 255)]
CoeffPlane(φ) :=
    S_x ← 0
    S_y ← 0
    S_z ← 0
    S_x2 ← 0
    S_y2 ← 0
    S_z2 ← 0
    S_xy ← 0
    S_xz ← 0
    S_yz ← 0
    M ← rows(φ) - 1
    N ← cols(φ) - 1
    for i ∈ 0 .. M
        for j ∈ 0 .. N
            x ← j
            y ← i
            z ← φ[y, x]
            if z ≠ -1
                S_x ← S_x + x
                S_y ← S_y + y
                S_z ← S_z + z
                S_x2 ← S_x2 + x^2
                S_y2 ← S_y2 + y^2
                S_z2 ← S_z2 + z^2
                S_xy ← S_xy + x*y
                S_xz ← S_xz + x*z
                S_yz ← S_yz + y*z
    [a; b; c] ← [S_x2, S_xy, S_xz; S_xy, S_y2, S_yz; S_xz, S_yz, S_z2]^-1*[-S_x; -S_y; -S_z]
min(φ4) = -1
(transpose([x_1, y_1, z_1; x_2, y_2, z_2; x_3, y_3, z_3; x_4, y_4, z_4])*[x_1, y_1, z_1; x_2, y_2, z_2; x_3, y_3, z_3; x_4, y_4, z_4])*[a; b; c] == transpose([x_1, y_1, z_1; x_2, y_2, z_2; x_3, y_3, z_3; x_4, y_4, z_4])*[-1; -1; -1; -1]
transpose([x_1, y_1, z_1; x_2, y_2, z_2; x_3, y_3, z_3; x_4, y_4, z_4])*[x_1, y_1, z_1; x_2, y_2, z_2; x_3, y_3, z_3; x_4, y_4, z_4] == [
    x_1^2 + x_2^2 + x_3^2 + x_4^2, x_1*y_1 + x_2*y_2 + x_3*y_3 + x_4*y_4, x_1*z_1 + x_2*z_2 + x_3*z_3 + x_4*z_4;
    x_1*y_1 + x_2*y_2 + x_3*y_3 + x_4*y_4, y_1^2 + y_2^2 + y_3^2 + y_4^2, y_1*z_1 + y_2*z_2 + y_3*z_3 + y_4*z_4;
    x_1*z_1 + x_2*z_2 + x_3*z_3 + x_4*z_4, y_1*z_1 + y_2*z_2 + y_3*z_3 + y_4*z_4, z_1^2 + z_2^2 + z_3^2 + z_4^2
]
transpose([x_1, y_1, z_1; x_2, y_2, z_2; x_3, y_3, z_3; x_4, y_4, z_4])*[-1; -1; -1; -1] == -[x_1 + x_2 + x_3 + x_4; y_1 + y_2 + y_3 + y_4; z_1 + z_2 + z_3 + z_4]
(transpose([x_1, y_1, z_1; x_2, y_2, z_2; x_3, y_3, z_3; x_4, y_4, z_4])*[x_1, y_1, z_1; x_2, y_2, z_2; x_3, y_3, z_3; x_4, y_4, z_4])^-1*(transpose([x_1, y_1, z_1; x_2, y_2, z_2; x_3, y_3, z_3; x_4, y_4, z_4])*[-1; -1; -1; -1]) == [a; b; c]
A := [1, 1, 3; 1, 2, 6; 2, 2, 1]
A[2, 1] = 2
[x_1, y_1, z_1; x_2, y_2, z_2; x_3, y_3, z_3] := A
rank((transpose([x_1, y_1, z_1; x_2, y_2, z_2; x_3, y_3, z_3])*[x_1, y_1, z_1; x_2, y_2, z_2; x_3, y_3, z_3])^-1) = 3
[a; b; c] := (transpose([x_1, y_1, z_1; x_2, y_2, z_2; x_3, y_3, z_3])*[x_1, y_1, z_1; x_2, y_2, z_2; x_3, y_3, z_3])^-1*(transpose([x_1, y_1, z_1; x_2, y_2, z_2; x_3, y_3, z_3])*[-1; -1; -1]) = [-1; 0.6; -0.2]
a*x_1 + b*y_1 + c*z_1 + 1 = 2.22045e-15
a*x_2 + b*y_2 + c*z_2 + 1 = 7.99361e-15
a*x_3 + b*y_3 + c*z_3 + 1 = 1.19904e-14
a*x + b*y + c*z == -1
z == -(a*x + b*y + 1)/c
Plane(φ, K) :=
    [a; b; c] ← [K[0]; K[1]; K[2]]
    M ← rows(φ) - 1
    N ← cols(φ) - 1
    for i ∈ 0 .. M
        for j ∈ 0 .. N
            x ← j
            y ← i
            z ← φ[y, x]
            φ5[i, j] ← -((a*x + b*y + 1)/c) if z ≠ -1
            φ5[i, j] ← z otherwise
    φ5
K := CoeffPlane(φ4) = [-0.00113023; -0.00110019; 0.00563537]
φ5 := Plane(φ4, K)
# [component: inputs φ5 - φ4]
[a; b; c] := [-0.5; -1.5; 2.1]
m := 7
i := 0 .. m
j := 0 .. m
Q[i, j] := -(a*j + b*i + 1)/c + rnd(3)
Q := [
    -1, -1, -1, -1, -1, -1, -1, -1;
    -1, -1, 0.714, -1, 1.19, -1, 1.667, -1;
    -1, 1.19, -1, 1.667, 1.905, 2.143, 2.381, -1;
    -1, -1, 2.143, -1, 2.619, -1, -1, -1;
    -1, -1, 2.857, -1, 3.333, 3.571, 3.81, -1;
    -1, 3.333, -1, 3.81, -1, 4.286, 4.524, -1;
    -1, -1, 4.286, 4.524, 4.762, 5, -1, -1;
    -1, -1, -1, -1, -1, -1, -1, -1
]  # disabled
K := CoeffPlane(Q) = [-0.0374235; 0.0312183; -0.190249]
φ5 := Plane(Q, K)
# [component: inputs Q, φ5]
